# Worksheet setting: ORIGIN = 1
# Формирование ЛЕВЫХ (кинетических) частей ДУ динамики
# 4-х звенного 3D ТВЕРДОТЕЛьНОГО манипулятора
# без груза с параметрами звеньев квази-ЛМ
# Алгоритм вложенных функций (АВФ)
g := 9.81
# Геометрические параметры манипулятора и привода:
l2 := 2
l3 := 2
l4 := 3
L1 := transpose([1.1, 0.2, 0])
L2 := transpose([0, l2, 0])
L3 := transpose([0, l3, 0])
L4 := transpose([0, l4, 0])
r1 := transpose([0.1, -0.1, 0])
r2 := transpose([0, 1.73, 0.04])
r3 := transpose([0, 1.48, 0.08])
r4 := transpose([0, 1.04, -0.15])
q1 := L1 - r1
q2 := L2 - r2
q3 := L3 - r3
q4 := L4 - r4
# Массы звеньев 1-4
m1 := 1700
m2 := 850
m3 := 510
m4 := 1100
# Центральные моменты инерции звеньев относительно осей, параллельных  осям сочленений
J1 := m1*|r1|^2 + m1*2
J2 := m2*l2^2*12^-1
J3 := m3*l3^2*12^-1
J4 := m4*l4^2*12^-1
# Матрицы инерции (приближенные) в локальных центральных базисах
I1 := [0.5*J1, 0, 0; 0, 0.5*J1, 0; 0, 0, J1]
I2 := [J2, 0, 0; 0, 0.1*J2, 0; 0, 0, J2]
I3 := [J3, 0, 0; 0, 0.1*J3, 0; 0, 0, J3]
I4 := [J4, 0, 0; 0, 0.3*J4, 0; 0, 0, J4]
J1 = 3434
J2 = 283.333
J3 = 170
J4 = 825
# Параметры гибкого груза
Lд := 15  # - длина ствола
Rн := 0.2
Rв := 0.07  # - нижний и верхний радиусы ствола
R(x) := Rн - x/Lд*(Rн - Rв)
ρд := 800  # - плотность
ρ4(x) := ρд*π*R(x)^2
m4 := integral(ρ4(x), x = 0 .. Lд)
χ := integral(ρ4(x)*x, x = 0 .. Lд)
m4 = 740.159  # - масса дерева
ξc := χ*m4^-1
ξc = 5.26528  # - расстояние от спила до ц.м. ствола
# В системе (x0,y0,z0):
p0 := transpose([0.61, -0.5, 0])  # - П-опора ГЦ-1
# В системе (x1,y1,z1):
p1 := transpose([-0.89, 0, 0])  # - Ш-опора ГЦ-1
s1 := transpose([-2.81, -0.25, 0])  # - П-опора ГЦ-2
# В системе (x2,y2,z2):
p2 := transpose([-2.65, -0.23, 0])  # - Ш-опора ГЦ-2
s2 := transpose([-3.16, 0.45, 0])  # - П-опора ГЦ-3
# В системе (x3,y3,z3)
s3 := transpose([-(0.59 + .25), 0.63, 0])  # - Ш-опора ГЦ-3
# Изображение начального положения механизма:
ϕ1 := π/180*0
ϕ2 := π/180*(-45)
ϕ3 := π/180 + 45
ϕ4 := π/180*45 + 10
# Матрица P преобразования координат вектора
# из базиса (B0) в базис (B1)
P(α) := [cos(α), sin(α), 0; -sin(α), cos(α), 0; 0, 0, 1]
# Матрица  Q  преобразования координат вектора из базиса (Bk) в базис (Bk+1), k=2,3,4
k := transpose([0, 0, 1])
Q(α) := [1, 0, 0; 0, cos(α), sin(α); 0, -sin(α), cos(α)]
i := transpose([1, 0, 0])
j := transpose([0, 1, 0])
S(α) := transpose(P(α))
T(α) := transpose(Q(α))
A := S(ϕ1)*L1
B := A + S(ϕ1)*T(ϕ2)*L2
D := B + S(ϕ1)*T(ϕ2 + ϕ3)*L3
K := D + S(ϕ1)*T(ϕ2 + ϕ3 + ϕ4)*L4
N := K + S(ϕ1)*T(ϕ2 + ϕ3 + ϕ4)*k*ξc
MX := transpose([0, A[1], B[1], D[1], K[1], N[1]])
MY := transpose([0, A[2], B[2], D[2], K[2], N[2]])
MZ := transpose([0, A[3], B[3], D[3], K[3], N[3]])
180/π*[ϕ1; ϕ2; ϕ3] = [0; -45; 2579.31]
# [component: inputs (MX, MY, MZ)]
# Ход  гидроцилиндров
# стрелы  рукояти  ЗСУ
# угол  18 - 53  320  - 242  22 - 65
# длина  201 - 249  252 - 293  258 - 292
# для углов  18  320  22
# длины  201  338  317
# запас  32 cv  12 см  22 cv
k = [0; 0; 1]
# Прямой ход. Кинематика.
[β, γ, δ, α', β', γ', δ', α'', β'', γ'', δ''] := [π*45/180, -π*45/180, π*45/180, 1, 1, 1, 1, 1, 1, 1, 1]
# Cкорости и ускорения звена 1 в базисе В1
a0 := transpose([0, 0, 0])
ω1(α') := k*α'
ε1(α'') := k*α''
ac1(α', α'') := a0 + ω1(α')×(ω1(α')×r1) + ε1(α'')×r1
a1(α', α'') := a0 + ω1(α')×(ω1(α')×L1) + ε1(α'')×L1
# Cкорости и ускорения звена 2 в базисе В2
ω2(β, α', β') := Q(β)*ω1(α') + i*β'
ε2(β, α', β', α'', β'') := Q(β)*ε1(α'') + (Q(β)*ω1(α'))×i*β' + i*β''
ac2(β, α', β', α'', β'') := Q(β)*a1(α', α'') + ω2(β, α', β')×(ω2(β, α', β')×r2) + ε2(β, α', β', α'', β'')×r2
a2(β, α', β', α'', β'') := Q(β)*a1(α', α'') + ω2(β, α', β')×(ω2(β, α', β')×L2) + ε2(β, α', β', α'', β'')×L2
# Cкорости и ускорения звена 3 в базисе В3
ω3(β, γ, α', β', γ') := Q(γ)*ω2(β, α', β') + i*γ'
ε3(β, γ, α', β', γ', α'', β'', γ'') := Q(γ)*ε2(β, α', β', α'', β'') + (Q(γ)*ω2(β, α', β'))×i*γ' + i*γ''
ac3(β, γ, α', β', γ', α'', β'', γ'') := Q(γ)*a2(β, α', β', α'', β'') + ω3(β, γ, α', β', γ')×(ω3(β, γ, α', β', γ')×r3) + ε3(β, γ, α', β', γ', α'', β'', γ'')×r3
a3(β, γ, α', β', γ', α'', β'', γ'') := Q(γ)*a2(β, α', β', α'', β'') + ω3(β, γ, α', β', γ')×(ω3(β, γ, α', β', γ')×L3) + ε3(β, γ, α', β', γ', α'', β'', γ'')×L3
# Cкорости и ускорения звена 4 в базисе В4
ω4(β, γ, δ, α', β', γ', δ') := Q(δ)*ω3(β, γ, α', β', γ') + i*δ'
ε4(β, γ, δ, α', β', γ', δ', α'', β'', γ'', δ'') := Q(δ)*ε3(β, γ, α', β', γ', α'', β'', γ'') + (Q(δ)*ω3(β, γ, α', β', γ'))×i*δ' + i*δ''
ac4(β, γ, δ, α', β', γ', δ', α'', β'', γ'', δ'') := Q(δ)*a3(β, γ, α', β', γ', α'', β'', γ'') + ω4(β, γ, δ, α', β', γ', δ')×(ω4(β, γ, δ, α', β', γ', δ')×r4) + ε4(β, γ, δ, α', β', γ', δ', α'', β'', γ'', δ'')×r4
a4(β, γ, δ, α', β', γ', δ', α'', β'', γ'', δ'') := Q(δ)*a3(β, γ, α', β', γ', α'', β'', γ'') + ω4(β, γ, δ, α', β', γ', δ')×(ω4(β, γ, δ, α', β', γ', δ')×L4) + ε4(β, γ, δ, α', β', γ', δ', α'', β'', γ'', δ'')×L4
# Обратный ход. Динамика.
# Звено 4. Расчет силы и момента в сочленении О4 (в базисе В4)
R4(β, γ, δ, α', β', γ', δ', α'', β'', γ'', δ'') := m4*ac4(β, γ, δ, α', β', γ', δ', α'', β'', γ'', δ'')
M4(β, γ, δ, α', β', γ', δ', α'', β'', γ'', δ'') := I4*ε4(β, γ, δ, α', β', γ', δ', α'', β'', γ'', δ'') + ω4(β, γ, δ, α', β', γ', δ')×(I4*ω4(β, γ, δ, α', β', γ', δ')) + r4×R4(β, γ, δ, α', β', γ', δ', α'', β'', γ'', δ'')
# Приводной момент:
μ4(β, γ, δ, α', β', γ', δ', α'', β'', γ'', δ'') := M4(β, γ, δ, α', β', γ', δ', α'', β'', γ'', δ'')*i
# Элементы матрицы масс:
a41(β, γ, δ) := μ4(β, γ, δ, 0, 0, 0, 0, 1, 0, 0, 0)
a42(β, γ, δ) := μ4(β, γ, δ, 0, 0, 0, 0, 0, 1, 0, 0)
a43(β, γ, δ) := μ4(β, γ, δ, 0, 0, 0, 0, 0, 0, 1, 0)
a44(β, γ, δ) := μ4(β, γ, δ, 0, 0, 0, 0, 0, 0, 0, 1)
# Гироцентробежный член 4-го ДУ динамики
b4(β, γ, δ, α', β', γ', δ') := μ4(β, γ, δ, α', β', γ', δ', 0, 0, 0, 0)
# Звено 3. Расчет силы и момента в сочленении О3 (в базисе В3)
R3(β, γ, δ, α', β', γ', δ', α'', β'', γ'', δ'') := m3*ac3(β, γ, α', β', γ', α'', β'', γ'') + (T(δ)*R4(β, γ, δ, α', β', γ', δ', α'', β'', γ'', δ''))
M3(β, γ, δ, α', β', γ', δ', α'', β'', γ'', δ'') := I3*ε3(β, γ, α', β', γ', α'', β'', γ'') + ω3(β, γ, α', β', γ')×(I3*ω3(β, γ, α', β', γ')) + r3×R3(β, γ, δ, α', β', γ', δ', α'', β'', γ'', δ'') + T(δ)*M4(β, γ, δ, α', β', γ', δ', α'', β'', γ'', δ'') + q3×(T(δ)*R4(β, γ, δ, α', β', γ', δ', α'', β'', γ'', δ''))
# Приводной момент
μ3(β, γ, δ, α', β', γ', δ', α'', β'', γ'', δ'') := M3(β, γ, δ, α', β', γ', δ', α'', β'', γ'', δ'')*i
a31(β, γ, δ) := μ3(β, γ, δ, 0, 0, 0, 0, 1, 0, 0, 0)
a32(β, γ, δ) := μ3(β, γ, δ, 0, 0, 0, 0, 0, 1, 0, 0)
a33(β, γ, δ) := μ3(β, γ, δ, 0, 0, 0, 0, 0, 0, 1, 0)
a34(β, γ, δ) := μ3(β, γ, δ, 0, 0, 0, 0, 0, 0, 0, 1)
b3(β, γ, δ, α', β', γ', δ') := μ3(β, γ, δ, α', β', γ', δ', 0, 0, 0, 0)
# Звено 2. Расчет силы и момента в сочленении О2 (в базисе В2)
R2(β, γ, δ, α', β', γ', δ', α'', β'', γ'', δ'') := m2*ac2(β, α', β', α'', β'') + T(γ)*R3(β, γ, δ, α', β', γ', δ', α'', β'', γ'', δ'')
M2(β, γ, δ, α', β', γ', δ', α'', β'', γ'', δ'') := I2*ε2(β, α', β', α'', β'') + ω2(β, α', β')×(I3*ω2(β, α', β')) + r2×R2(β, γ, δ, α', β', γ', δ', α'', β'', γ'', δ'') + T(γ)*M3(β, γ, δ, α', β', γ', δ', α'', β'', γ'', δ'') + q2×(T(γ)*R3(β, γ, δ, α', β', γ', δ', α'', β'', γ'', δ''))
μ2(β, γ, δ, α', β', γ', δ', α'', β'', γ'', δ'') := M2(β, γ, δ, α', β', γ', δ', α'', β'', γ'', δ'')*i
a21(β, γ, δ) := μ2(β, γ, δ, 0, 0, 0, 0, 1, 0, 0, 0)
a22(β, γ, δ) := μ2(β, γ, δ, 0, 0, 0, 0, 0, 1, 0, 0)
a23(β, γ, δ) := μ2(β, γ, δ, 0, 0, 0, 0, 0, 0, 1, 0)
a24(β, γ, δ) := μ2(β, γ, δ, 0, 0, 0, 0, 0, 0, 0, 1)
b2(β, γ, δ, α', β', γ', δ') := μ2(β, γ, δ, α', β', γ', δ', 0, 0, 0, 0)
# Звено 1. Расчет силы и момента в сочленении О1 (в базисе В1)
R1(β, γ, δ, α', β', γ', δ', α'', β'', γ'', δ'') := m1*ac1(α', α'') + T(β)*R2(β, γ, δ, α', β', γ', δ', α'', β'', γ'', δ'')
M1(β, γ, δ, α', β', γ', δ', α'', β'', γ'', δ'') := I1*ε1(α'') + ω1(α')×(I3*ω1(α')) + r1×R1(β, γ, δ, α', β', γ', δ', α'', β'', γ'', δ'') + T(β)*M2(β, γ, δ, α', β', γ', δ', α'', β'', γ'', δ'') + q1×(T(β)*R2(β, γ, δ, α', β', γ', δ', α'', β'', γ'', δ''))
μ1(β, γ, δ, α', β', γ', δ', α'', β'', γ'', δ'') := M1(β, γ, δ, α', β', γ', δ', α'', β'', γ'', δ'')*k
a11(β, γ, δ) := μ1(β, γ, δ, 0, 0, 0, 0, 1, 0, 0, 0)
a12(β, γ, δ) := μ1(β, γ, δ, 0, 0, 0, 0, 0, 1, 0, 0)
a13(β, γ, δ) := μ1(β, γ, δ, 0, 0, 0, 0, 0, 0, 1, 0)
a14(β, γ, δ) := μ1(β, γ, δ, 0, 0, 0, 0, 0, 0, 0, 1)
b1(β, γ, δ, α', β', γ', δ') := μ1(β, γ, δ, α', β', γ', δ', 0, 0, 0, 0)
A(β, γ, δ) := [
    a11(β, γ, δ), a12(β, γ, δ), a13(β, γ, δ), a14(β, γ, δ);
    a21(β, γ, δ), a22(β, γ, δ), a23(β, γ, δ), a24(β, γ, δ);
    a31(β, γ, δ), a32(β, γ, δ), a33(β, γ, δ), a34(β, γ, δ);
    a41(β, γ, δ), a42(β, γ, δ), a43(β, γ, δ), a44(β, γ, δ)
]
B(β, γ, δ, α', β', γ', δ') := [
    b1(β, γ, δ, α', β', γ', δ');
    b2(β, γ, δ, α', β', γ', δ');
    b3(β, γ, δ, α', β', γ', δ');
    b4(β, γ, δ, α', β', γ', δ')
]
A(β, γ, δ) = [
    28102.6, -3672.28, -557.261, -512.381;
    -3672.28, 25730.1, 13142.6, 4427.37;
    -557.261, 13142.6, 8384.46, 2887.83;
    -512.381, 4427.37, 2887.83, 1642.21
]
B(β, γ, δ, α', β', γ', δ') = [-50716.1; 17374.7; -5492.84; 5868.56]
# Очень медленный счет:
# 14 сек на одно значение мавтрицы инерции
# 4 сек на одно значение вектора моментов
eigenvals(A(β, γ, δ)) = [35392.1; 26440.5; 1509.36; 517.412]
